// COMSOL Multiphysics 6.0.0.318 model "acrobat.mph"
// Outline of the model tree

Parameters
  M0 = 10[N*m]
  M1 = 10[N*m]

Probes
  var1: GlobalVariable "Global Variable Probe 1"
    expr = mbd.rd1.thz
    unit = 1
    descr = Rigid body rotation, z component
    table = tbl1
  var2: GlobalVariable "Global Variable Probe 2"
    expr = mbd.rd1.th_tz
    unit = rad/s
    descr = Rigid body angular velocity, z component
    table = tbl1
  var3: GlobalVariable "Global Variable Probe 3"
    expr = mbd.rd2.thz
    unit = 1
    descr = Rigid body rotation, z component
    table = tbl1
  var4: GlobalVariable "Global Variable Probe 4"
    expr = mbd.rd2.th_tz
    unit = rad/s
    descr = Rigid body angular velocity, z component
    table = tbl1

Geometry
  geom1 "Geometry 1" (2D, length unit m)
    r1: Rectangle | pos = {-0.025, 0}; size = {0.05, 1}
    pt1: Point
    r2: Rectangle | pos = {-0.025, 1}; size = {0.05, 1}
    pt2: Point | p = {, 1}
    fin: Finalize "Form Union"

Materials
  mat1: Common "Structural steel" on all domains
    def "Basic"
      relpermeability = 1
      heatcapacity = 475[J/(kg*K)]
      thermalconductivity = 44.5[W/(m*K)]
      electricconductivity = 4.032e6[S/m]
      relpermittivity = 1
      thermalexpansioncoefficient = 12.3e-6[1/K]
      density = 7850[kg/m^3]
    Enu "Young's modulus and Poisson's ratio"
      E = 200e9[Pa]
      nu = 0.30
    Murnaghan
      l = -3.0e11[Pa]
      m = -6.2e11[Pa]
      n = -7.2e11[Pa]
    Lame "Lamé parameters"
      lambLame = 1.15e11[Pa]
      muLame = 7.69e10[Pa]

Physics
  mbd: MultibodyDynamics on all domains
    dependent variable u = {u, v, w}
    lemm1: LinearElasticModel "Linear Elastic Material 1" (default)
    free1: Free (default)
    init1: init "Initial Values 1" (default)
    gr1: Gravity on domains 1
    rd1: RigidDomain on domains 1 | CenterOfRotationType = CentroidOfSelectedEntities; EntityLevel = Point
      crp1: CenterOfRotationPoint on points 4
    rd2: RigidDomain on domains 2 | CenterOfRotationType = CentroidOfSelectedEntities; EntityLevel = Point
      crp1: CenterOfRotationPoint on points 5
    hgj1: HingeJoint | Source = fixed; Destination = rd1; CenterOfJointType = UserDefined; DestinationSelection: domains 1
      afm1: AppliedForceAndMoment | AppliedOnSelectedAttachment = Joint; Ms = M0
    hgj2: HingeJoint
      Source = rd1
      Destination = rd2
      CenterOfJointType = UserDefined
      xc = {0, 1, 0}
      SourceSelection: domains 1
      DestinationSelection: domains 2
      afm1: AppliedForceAndMoment | Mz = M1

Mesh
  mesh1 "Mesh 1" (physics-controlled)

Studies
  std1 "Study 1"
    time: Transient "Time Dependent" | tlist = range(0,0.1,1)

Solver configurations
  sol1 "Solution 1" (study std1)
    v1: Variables "Dependent Variables 1"
      comp1_u: Field "Displacement field (comp1.u)" | scalemethod = manual; scaleval = 1
      comp1_mbd_rd1_u: State "Rigid body displacement (spatial frame) (comp1.mbd.rd1.u)"
        scalemethod = manual
        scaleval = 1
      comp1_mbd_rd1_phi: State "Rigid body rotation (comp1.mbd.rd1.phi)" | scalemethod = manual; scaleval = 1
      comp1_mbd_hgj1_th: State "Relative rotation (comp1.mbd.hgj1.th)" | scalemethod = manual; scaleval = 1
      comp1_mbd_rd2_u: State "Rigid body displacement (spatial frame) (comp1.mbd.rd2.u)" | scalemethod = manual
      comp1_mbd_rd2_phi: State "Rigid body rotation (comp1.mbd.rd2.phi)" | scalemethod = manual
      comp1_mbd_hgj2_th: State "Relative rotation (comp1.mbd.hgj2.th)" | scalemethod = manual
    t1: Time "Time-Dependent Solver 1" | rtol = 0.001; tstepsbdf = strict; maxorder = 2
      dDef: Direct
      fc1: FullyCoupled | maxiter = 50; jtech = onevery
    sp1: StateSpace
      input = {M0, M1}
      output = {comp1.var1, comp1.var2, comp1.var3, comp1.var4}
      MA = on
      MB = on
      D = on
      C = on
      Mc = on
      Null = on
      ud = on
      x0 = on

Datasets
  dset1: Solution | solution = sol1
  dset2: Solution "Probe Solution 2" | solution = sol1

Derived values
  gev1: EvalGlobal "Global Variable Probe 1" | data = dset2; table = tbl1; expr = mbd.rd1.thz
  sys1: SystemMatrix | table = tbl2; solution = sol1; matrixstatespace = ssc; format = filled
  gev2: EvalGlobal "Global Variable Probe 2" | data = dset2; table = tbl1; expr = mbd.rd1.th_tz
  gev3: EvalGlobal "Global Variable Probe 3" | data = dset2; table = tbl1; expr = mbd.rd2.thz
  gev4: EvalGlobal "Global Variable Probe 4" | data = dset2; table = tbl1; expr = mbd.rd2.th_tz

Tables
  tbl1: Table "Probe Table 1"
    Time (s) | Rigid body rotation, z component (1) | mbd.rd1.th_tz (rad/s) | Rigid body rotation, z component (1) | Rigid body angular velocity, z component (rad/s)
    0 | 2.61753e-13 | 1.74502e-07 | -3.92384e-13 | -2.61589e-07
    0.001 | 8.74264e-08 | 8.74261e-05 | -1.31058e-07 | -0.000131057
    0.002 | 2.62106e-07 | 0.000174679 | -3.92913e-07 | -0.000261855
    0.004 | 8.15062e-07 | 0.000349191 | -1.22183e-06 | -0.00052346
    0.008 | 2.95525e-06 | 0.000698265 | -4.43011e-06 | -0.00104674
    0.016 | 1.1372e-05 | 0.00139681 | -1.70473e-05 | -0.0020939
    0.032 | 4.49798e-05 | 0.00279703 | -6.74275e-05 | -0.00419292
    0.064 | 0.00017988 | 0.00562269 | -0.000269652 | -0.00842876
    0.1 | 0.000441099 | 0.00886442 | -0.000661235 | -0.0132883
    0.15 | 0.00100321 | 0.0135483 | -0.00150387 | -0.0203097
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  tbl2: Table
    // System Matrix 1
     |  |  | 
    -0.0228523 | 0.0666375 | 0 | 0
    0 | 0 | 0 | 0
    0.657443 | 0.262697 | 0 | 0
    0 | 0 | 0 | 0

Plots
  pg1: PlotGroup2D "Displacement (mbd)" | data = dset1
    surf1: Surface | expr = mbd.disp
      def1: Deform "Deformation" | expr = {u, v}
  pg2: PlotGroup2D "Velocity (mbd)" | data = dset1
    surf1: Surface | expr = mod(dom,10)
      def1: Deform "Deformation" | expr = {u, v}
    arwl1: ArrowLine | expr = {mbd.u_tX, mbd.u_tY}; descr = Velocity
      def1: Deform "Deformation" | expr = {u, v}
  pg3: PlotGroup2D "Volume Loads (mbd)" | data = dset1
    arws1: ArrowSurface "Gravity 1" | expr = {mbd.gr1.F_Vx, mbd.gr1.F_Vy}; descr = Load (spatial frame)
      col: Color "Color Expression" | expr = mbd.gr1.F_V_Mag
      def: Deform "Deformation" | expr = {u, v}
    surf1: Surface "Gray Surfaces" | expr = 1
      def: Deform "Deformation" | expr = {u, v}
      sel1: Selection on domains 1
  pg4: PlotGroup1D "Probe Plot Group 4"
    tblp1: Table "Probe Table Graph 1" | table = tbl1

Exports
  anim1: Animation | target = player; maxframes = 11